j := sqrt(-1)
Given
I11*(R2 + 1/(p*C)) - I*R2 - I22/(p*C) == 0
I22*(R3 + p*L + 1/(p*C)) - I11/(p*C) == 0
Find(I11, I22) simplify → [
    I*R2*(C*L*p^2 + C*R3*p + 1)/(R2 + R3 + L*p + C*R2*R3*p + C*L*R2*p^2);
    I*R2/(R2 + R3 + L*p + C*R2*R3*p + C*L*R2*p^2)
]
I22(p) := I(p)*R2/(R2 + R3 + L*p + C*R2*R3*p + C*L*R2*p^2)  # error: Эта переменная не определена.
# Определение операторных функций цепи
I(p) := Im*cos(ω*t + φ)  # error: Эта переменная не определена.
ImL(p) := R2*I(p)/(R2 + R3 + L*p + C*R2*R3*p + C*L*R2*p^2)  # error: Эта переменная не определена.
# Комплексная передаточная функция:
KiL(p) := □  # error: Пустой местозаполнитель.
ImL(p)/I(p) simplify → R2/(R2 + R3 + L*p + C*R2*R3*p + C*L*R2*p^2)
KiL(ω) := R2/(R2 + R3 + L*j*ω + C*R2*R3*j*ω - C*L*R2*ω^2)  # error: Эта переменная не определена.
R3 := 25
L := 2*10^-3
R2 := 10^4
C := 10^-8
KiL(ω) := R2*e^(j*atan((L*ω + C*R2*R3*ω)/(R2 + R3 - C*L*R2*ω^2)))/sqrt((R2 + R3 - C*L*R2*ω^2)^2 + (L*ω + C*R2*R3*ω)^2)
# Амплитудно - частотная характеристика:
KiLm(ω) := |R2/(R2 + R3 + L*j*ω + C*R2*R3*j*ω - C*L*R2*ω^2)|
# Фазово-частотная характеристика
φk(ω) := arg(R2/(R2 + R3 + L*j*ω + C*R2*R3*j*ω - C*L*R2*ω^2))
a := R2 + R3
b := L + C*R2*R3
c := C*L*R2
p := j*ω  # error: Эта переменная не определена.
p(x) := c*x^2 + b*x + a
v := p(x) coeffs, x → [10025; 9/2000; 1/5000000]
r := polyroots(v) = [-11250 + 223603i; -11250 - 223603i]
transpose(r) → [-11250 + 223603.303866i, -11250.0 - 223603.303866i]
p1 := -11250 + 2.23*10^5*j
p2 := -11250 - 2.23*10^5*j
ωmax := 2*sqrt((1.125*10^4)^2 + (2.23*10^5)^2) → 446567.184195
ω0 := 1/sqrt(L*C) = 223607  # Рад/с
ω := 0.1..5*10^4  # error: Не удается распознать этот синтаксис.
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