j := sqrt(-1)
Given
I22*(R2 + 1/(p*C)) + I11*R2 - I33/(p*C) == I*R2
I33*(R3 + p*L + 1/(p*C)) - I22/(p*C) + I11*(R3 + p*L) == 0
I11*(R3 + p*L + R2) + I33*(R3 + p*L) + I22*R2 == 0
Find(I11, I22, I33)  # error: Решение не было найдено.
