E := 4
T := 0.00005
f := 1/T
t := 0, T/1000 .. 2*T
Ω := 2*π/T
N := 20
s(t) := if(t ≤ T/2, -2*E*t/T, if(T/2 ≤ t ≤ 3*T/2, 2*E - 2*E*t/T, s(t - T)))
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a0 := 1/T*integral(-2*E*t/T, t = 0 .. T/2) + 1/T*integral(2*E - 2*E*t/T, t = T/2 .. T) simplify → 1.26217744835e-28
a0 := 1/T*integral(2*E - 2*E*t/T, t = T/2 .. T) simplify → 1.0
Given
U11*g1 - U22*g1 == J
-U11*g1 + U22*(g1 + g2 + p*C1 + p*C2) - U44*p*C1 == 0
-U22*p*C2 - U44*(g3 + p*C2) == 0
Find(U11, U22, U44) simplify → [
    J/g1 + (J*g3 + C2*J*p)/(C2^2*p^2 + g2*g3 + C1*g3*p + C2*g2*p + C2*g3*p + 2*C1*C2*p^2);
    J*(g3 + C2*p)/(C2^2*p^2 + g2*g3 + C1*g3*p + C2*g2*p + C2*g3*p + 2*C1*C2*p^2);
    -C2*J*p/(C2^2*p^2 + g2*g3 + C1*g3*p + C2*g2*p + C2*g3*p + 2*C1*C2*p^2)
]
Given
U44 := C2*J*p/(C2^2*p^2 + g2*g3 + C1*g3*p + C2*g2*p + C2*g3*p + 2*C1*C2*p^2)  # error: Эта переменная не определена.
U11 := J/g1 + (J*g3 + C2*J*p)/(C2^2*p^2 + g2*g3 + C1*g3*p + C2*g2*p + C2*g3*p + 2*C1*C2*p^2)  # error: Эта переменная не определена.
K(p) := U44/U11 simplify →  # error: Эта переменная не определена.
-C2*J*p/(C2^2*p^2 + g2*g3 + C1*g3*p + C2*g2*p + C2*g3*p + 2*C1*C2*p^2)/(J/g1 + (J*g3 + C2*J*p)/(C2^2*p^2 + g2*g3 + C1*g3*p + C2*g2*p + C2*g3*p + 2*C1*C2*p^2)) simplify → -C2*g1*p/(C2^2*p^2 + g1*g3 + g2*g3 + C2*g1*p + C1*g3*p + C2*g2*p + C2*g3*p + 2*C1*C2*p^2)
g1 := 1/80000
g2 := 1/800
g3 := 1/320000
C1 := 16*10^-11
C2 := 16*10^-11
C2*g1*p/(C2^2*p^2 + g1*g3 + g2*g3 + C2*g1*p + C1*g3*p + C2*g2*p + C2*g3*p + 2*C1*C2*p^2) simplify → 312500*p/(12*p^2 + 31718750*p + 616455078125)
a := g3*(g1 + g2)
b := C2*g1 + C1*g2 + C2*g3
c := C2^2 + 2*C1*C2
f(u) := c*u^2 + b*u + a
f1 := f(u) coeffs, u → [101/25600000000; 81/400000000000000; 3/39062500000000000000]
f2 := polyroots(f1)
transpose(f2) → transpose(polyroots(428056564, [101/25600000000; 81/400000000000000; 3/39062500000000000000]))
|C2*g1*p/(C2^2*p^2 + g1*g3 + g2*g3 + C2*g1*p + C1*g3*p + C2*g2*p + C2*g3*p + 2*C1*C2*p^2)| simplify → |p|/(500000000000000*|3*p^2/39062500000000000000 + 203*p/1000000000000000 + 101/25600000000|)
Km(ω) := |-C2*g1*1i*ω/(C2^2*(1i*ω)^2 + g1*g3 + g2*g3 + C2*g1*(1i*ω) + C1*g3*(1i*ω) + C2*g2*(1i*ω) + C2*g3*(1i*ω) + 2*C1*C2*(1i*ω)^2)|
K(p) := C2*g1*p/(C2^2*p^2 + g1*g3 + g2*g3 + C2*g1*p + C1*g3*p + C2*g2*p + C2*g3*p + 2*C1*C2*p^2)
ψk(ω) := arg(-C2*g1*(1i*ω)/(C2^2*(1i*ω)^2 + g1*g3 + g2*g3 + C2*g1*(1i*ω) + C1*g3*(1i*ω) + C2*g2*(1i*ω) + C2*g3*(1i*ω) + 2*C1*C2*(1i*ω)^2))
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Ω := 2*π/T
Km(n) := |-C2*g1*1i*Ω*n/(C2^2*(1i*(Ω*n))^2 + g1*g3 + g2*g3 + C2*g1*(1i*(Ω*n)) + C1*g3*(1i*(Ω*n)) + C2*g2*(1i*(Ω*n)) + C2*g3*(1i*(Ω*n)) + 2*C1*C2*(1i*(Ω*n))^2)|
ψk(n) := arg(-C2*g1*(1i*(Ω*n))/(C2^2*(1i*(Ω*n))^2 + g1*g3 + g2*g3 + C2*g1*(1i*(Ω*n)) + C1*g3*(1i*(Ω*n)) + C2*g2*(1i*(Ω*n)) + C2*g3*(1i*(Ω*n)) + 2*C1*C2*(1i*(Ω*n))^2))
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